// SBML level 2 version 4

model New_Model_1()

  // Compartments:
  compartment compartment = 1;

  // Species:
  species A in compartment = 1;
  species B in compartment = 100;

  // Parameters:
  k_predator_breeds = 0.4884485;
  k_predator_dies = 0.9170111;
  k_prey_breeds = 0.09583007;
  k_prey_dies = 0.01965089;

  // Reactions:
  reaction: A + B => 2 A + B; compartment*k_predator_breeds*A*B; reaction is "predator_breeds";
  predator_dies: A => ; compartment*k_predator_dies*A;
  prey_breeds: B => 2 B; compartment*k_prey_breeds*B;
  prey_dies: A + B => A; compartment*k_prey_dies*A*B;

  // Unit definitions:
  unit volume = 1e-3 litre;
  unit substance = 1e-3 mole;
end
